*******************************************************************************
************************************* step ************************************
*******************************************************************************
*STEP, NLGEOM=no, INC=9999999
**************** method *****************
*VISCO, CETOL=0.9999
0.05, 1800,  0.05, 0.05
**************** temperature *****************
*TEMPERATURE, AMPLITUDE=amp-theta
all_nset, 1
**************** boundary *****************
*BOUNDARY
bottom, 1,3, 0.
5, 2,2, 0.
*BOUNDARY, AMPLITUDE=amp-sin
5, 1,1, 0.01
**************** output ****************
*OUTPUT, FIELD, VARIABLE=PRESELECT, FREQUENCY=5
*EL PRINT, POSITION=CENTROIDAL
E33, S13, E13, CE13, CEMAG
*END STEP
